<?xml version="1.0"?>
<!-- Generated by Aero-Matic v 1.1

     Inputs:
                horsepower: 350.0
                     pitch: variable
            max engine rpm: 2850
        prop diameter (ft): 6.5

     Outputs:
              max prop rpm: 2886.62
                gear ratio:    0.99
                       Cp0: 0.062653
                       Ct0: 0.145981
       static thrust (lbs): 1434.29

       The ixx of 3.88 gives us about 12 pounds per blade.
       Counterweighted Propellers HC-C3YR-4
-->

<propeller name="prop">
  <ixx>   3.88 </ixx>
  <diameter unit="IN">  78.0 </diameter>
  <numblades> 3 </numblades>
  <gearratio>  1.00 </gearratio>
  <cp_factor> 1.0 </cp_factor>
  <ct_factor> 1.0 </ct_factor>
  <minpitch> 8 </minpitch>
  <maxpitch> 45 </maxpitch>
  <minrpm>   2100 </minrpm>
  <maxrpm>   2700 </maxrpm>

 <!-- thrust coefficient as a function of advance ratio and blade angle -->
  <table name="C_THRUST" type="internal">
      <tableData>
                -10        0         15        25        35        45        55        65       90
      -0.2      -0.0712    0.0401    0.1460    0.1788    0.1971    0.2080    0.1917    0.1642   0.0000
       0.0      -0.1058    0.0000    0.1460    0.1788    0.1971    0.2099    0.1962    0.1642   0.0000
       0.2      -0.1187   -0.0365    0.1260    0.1752    0.1943    0.2099    0.1962    0.1642   0.0000
       0.4      -0.1187   -0.0848    0.0949    0.1734    0.1907    0.2080    0.1962    0.1642   0.0000
       0.6      -0.1187   -0.1187    0.0502    0.1561    0.1825    0.2026    0.1934    0.1642   0.0000
       0.8      -0.1187   -0.1187    0.0028    0.1168    0.1771    0.1953    0.1934    0.1642   0.0000
       1.0      -0.1187   -0.1187   -0.0474    0.0712    0.1698    0.1852    0.1917    0.1642   0.0000
       1.2      -0.1187   -0.1187   -0.0977    0.0219    0.1396    0.1788    0.1917    0.1642   0.0000
       1.4      -0.1187   -0.1187   -0.1187   -0.0320    0.1004    0.1761    0.1880    0.1642   0.0000
       1.6      -0.1187   -0.1187   -0.1187   -0.0812    0.0547    0.1698    0.1844    0.1642   0.0000
       1.8      -0.1187   -0.1187   -0.1187   -0.1187    0.0092    0.1460    0.1788    0.1642   0.0000
       2.0      -0.1187   -0.1187   -0.1187   -0.1187   -0.0365    0.1140    0.1781    0.1642   0.0000
       2.2      -0.1187   -0.1187   -0.1187   -0.1187   -0.0822    0.0822    0.1752    0.1642   0.0000
       2.4      -0.1187   -0.1187   -0.1187   -0.1187   -0.1187    0.0438    0.1431    0.1642   0.0000
       2.6      -0.1187   -0.1187   -0.1187   -0.1187   -0.1187    0.0055    0.0905    0.1460   0.0000
       2.8      -0.1187   -0.1187   -0.1187   -0.1187   -0.1187   -0.0328    0.0593    0.1187   0.0000
       3.0      -0.1187   -0.1187   -0.1187   -0.1187   -0.1187   -0.0712    0.0311    0.0912   0.0000
       3.2      -0.1187   -0.1187   -0.1187   -0.1187   -0.1187   -0.1095    0.0028    0.0639   0.0000
       3.4      -0.1187   -0.1187   -0.1187   -0.1187   -0.1187   -0.1187   -0.0255    0.0365   0.0000
       3.6      -0.1187   -0.1187   -0.1187   -0.1187   -0.1187   -0.1187   -0.0539    0.0092   0.0000
       3.8      -0.1187   -0.1187   -0.1187   -0.1187   -0.1187   -0.1187   -0.0822   -0.0182   0.0000
       4.0      -0.1187   -0.1187   -0.1187   -0.1187   -0.1187   -0.1187   -0.1104   -0.0457   0.0000
       6.0      -0.1187   -0.1187   -0.1187   -0.1187   -0.1187   -0.1187   -0.1187   -0.1187   0.0000
      </tableData>
  </table>

 <!-- power coefficient as a function of advance ratio and blade angle -->
  <table name="C_POWER" type="internal">
     <tableData>
                -10       0        10        15        25        35        45        55        65        90
      -0.2      0.0105   0.0355    0.0267    0.0731    0.1660    0.2863    0.4072    0.4699    0.5200    0.5200
       0.0      0.0418   0.0502    0.0167    0.0627    0.1548    0.2738    0.4072    0.4718    0.5200    0.5200
       0.2      0.0595   0.0599    0.0189    0.0606    0.1441    0.2619    0.4072    0.4718    0.5200    0.5200
       0.4      0.0802   0.0690    0.0119    0.0522    0.1328    0.2487    0.4072    0.4718    0.5200    0.5200
       0.6      0.0984   0.0728   -0.0100    0.0345    0.1234    0.2331    0.3991    0.4699    0.5200    0.5200
       0.8      0.1159   0.0737   -0.0366    0.0105    0.1046    0.2193    0.3809    0.4699    0.5200    0.5200
       1.0      0.1335   0.0843   -0.0209    0.0105    0.0733    0.2068    0.3615    0.4680    0.5200    0.5200
       1.2      0.1516   0.0772   -0.0659   -0.0345    0.0282    0.1829    0.3465    0.4649    0.5200    0.5200
       1.4      0.1692   0.0807   -0.0676   -0.0520   -0.0209    0.1410    0.3415    0.4592    0.5200    0.5200
       1.6      0.1867   0.0877   -0.0599   -0.0608   -0.0627    0.0890    0.3321    0.4492    0.5012    0.5200
       1.8      0.2049   0.0979   -0.0418   -0.0627   -0.1046    0.0261    0.2945    0.4354    0.4906    0.5200
       2.0      0.2224   0.1014   -0.0473   -0.0802   -0.1460   -0.0313    0.2506    0.4148    0.4805    0.5200
       2.2      0.2400   0.1046   -0.0536   -0.0984   -0.1880   -0.0940    0.2036    0.4022    0.4592    0.5200
       2.4      0.2581   0.1085   -0.0589   -0.1159   -0.2299   -0.1566    0.1454    0.3903    0.4492    0.5200
       2.6      0.2757   0.1120   -0.0646   -0.1335   -0.2713   -0.1986    0.0608    0.3809    0.4336    0.5200
       2.8      0.2932   0.1153   -0.0708   -0.1516   -0.3133   -0.2381   -0.0207    0.3728    0.4279    0.5200
       3.0      0.3114   0.1192   -0.0762   -0.1692   -0.3552   -0.2819   -0.0940    0.3603    0.4279    0.5200
       3.2      0.3289   0.1227   -0.0818   -0.1867   -0.3966   -0.3239   -0.1673    0.3371    0.4179    0.5200
       3.4      0.3465   0.1259   -0.0881   -0.2049   -0.4386   -0.3653   -0.2400    0.2613    0.4072    0.5200
       3.6      0.3646   0.1298   -0.0934   -0.2224   -0.4805   -0.4072   -0.3133    0.1836    0.3966    0.5200
       3.8      0.3822   0.1333   -0.1000   -0.2400   -0.5200   -0.4492   -0.3866    0.1021    0.3841    0.5200
       4.0      0.3997   0.1366   -0.1272   -0.2581   -0.5200   -0.5200   -0.4592    0.0207    0.3552    0.5200
       6.0      0.5200   0.1040   -0.5200   -0.5200   -0.5200   -0.5200   -0.5200   -0.5200   -0.3133    0.5200
     </tableData>
  </table>

<!-- thrust effects of helical tip Mach -->
<table name="CT_MACH" type="internal">
  <tableData>
    0.85   1.0
    1.05   0.8
  </tableData>
</table>

<!-- power-required effects of helical tip Mach -->
<table name="CP_MACH" type="internal">
  <tableData>
    0.85   1.0
    1.05   1.8
    2.00   1.4
  </tableData>
</table>

</propeller>
