<?xml version="1.0"?>

<propeller name="HC-C3YR-4">
<!--
       This is a modified version of the Clark Y 0.10 t/c ratio variable pitch
       propeller found in JSBSim. It is intended to roughly simulate an
       HC-C3YR-4 as found in TCDS P256EA. The TCDS gives a max rpm of 2850 and
       a weight of 70 pounds. The ixx of 3.88 gives us about 12 pounds per blade,
       leaving 22 pounds for the hub.

       Counterweighted Propeller HC-C3YR-4
-->

  <diameter unit="IN">  78.0 </diameter>
  <ixx>       3.88 </ixx>
  <numblades> 3 </numblades>
  <minpitch> 11   </minpitch>
  <maxpitch> 35   </maxpitch>
  <gearratio> 1.0 </gearratio>
  <ct_factor> 1.5 </ct_factor>
  <cp_factor> 1.5 </cp_factor>
  <minrpm>   2100 </minrpm>
  <maxrpm>   2700 </maxrpm>

  <table name="C_THRUST" type="internal">
    <tableData>
              11       15       19       23       27       35       45
       -0.2   0.0750   0.0818   0.0910   0.0870   0.0950   0.1314   0.1387
        0.0   0.0750   0.0818   0.0910   0.0870   0.0950   0.1314   0.1399
        0.2   0.0630   0.0770   0.0900   0.0889   0.0925   0.1295   0.1399
        0.4   0.0395   0.0612   0.0801   0.0880   0.0888   0.1271   0.1387
        0.6   0.0095   0.0330   0.0591   0.0780   0.0870   0.1217   0.1351
        0.8  -0.0255  -0.0010   0.0294   0.0547   0.0752   0.1181   0.1302
        1.0  -0.0525  -0.0330  -0.0170   0.0280   0.0530   0.1132   0.1235
        1.2  -0.0750  -0.0580  -0.0460  -0.0010   0.0270   0.0931   0.1192
        1.4  -0.0800  -0.0790  -0.0670  -0.0330  -0.0010   0.0669   0.1174
        1.6  -0.0800  -0.0800  -0.0800  -0.0580  -0.0330   0.0365   0.1132
        1.8  -0.0800  -0.0800  -0.0800  -0.0790  -0.0580   0.0061   0.0973
        2.0  -0.0800  -0.0800  -0.0800  -0.0800  -0.0790  -0.0243   0.0760
        2.2  -0.0800  -0.0800  -0.0800  -0.0800  -0.0800  -0.0548   0.0548
        2.4  -0.0800  -0.0800  -0.0800  -0.0800  -0.0800  -0.0791   0.0292
        2.6  -0.0800  -0.0800  -0.0800  -0.0800  -0.0800  -0.0791   0.0037
        2.8  -0.0800  -0.0800  -0.0800  -0.0800  -0.0800  -0.0791  -0.0219
        3.0  -0.0810  -0.0800  -0.0800  -0.0800  -0.0800  -0.0791  -0.0475
        3.2  -0.0810  -0.0800  -0.0800  -0.0800  -0.0800  -0.0791  -0.0730
        3.4  -0.0810  -0.0800  -0.0800  -0.0800  -0.0800  -0.0791  -0.0791
        3.6  -0.0810  -0.0800  -0.0800  -0.0800  -0.0800  -0.0791  -0.0791
        3.8  -0.0810  -0.0800  -0.0800  -0.0800  -0.0800  -0.0791  -0.0791
        4.0  -0.0820  -0.0800  -0.0800  -0.0800  -0.0800  -0.0791  -0.0791
        6.0  -0.0820  -0.0800  -0.0800  -0.0800  -0.0800  -0.0791  -0.0791
    </tableData>
  </table>

  <table name="C_POWER" type="internal">
    <tableData>
              11       15       19       23       27       35       45
        0.0   0.0295   0.0400   0.0520   0.0769   0.1055   0.1825   0.2715
        0.2   0.0285   0.0400   0.0523   0.0740   0.1000   0.1746   0.2715
        0.4   0.0226   0.0384   0.0528   0.0663   0.0900   0.1658   0.2715
        0.6   0.0170   0.0255   0.0472   0.0656   0.0839   0.1554   0.2661
        0.8   0.0080   0.0170   0.0294   0.0551   0.0791   0.1462   0.2539
        1.0  -0.0226  -0.0164   0.0120   0.0349   0.0652   0.1379   0.2410
        1.2  -0.0290  -0.0348  -0.0345   0.0120   0.0398   0.1219   0.2310
        1.4  -0.0300  -0.0397  -0.0498  -0.0349   0.0140   0.0940   0.2277
        1.6  -0.0300  -0.0400  -0.0510  -0.0425  -0.0300   0.0593   0.2214
        1.8  -0.0300  -0.0400  -0.0527  -0.0656  -0.0607   0.0174   0.1963
        2.0  -0.0300  -0.0400  -0.0525  -0.0663  -0.0700  -0.0209   0.1671
        2.2  -0.0300  -0.0400  -0.0525  -0.0663  -0.0700  -0.0627   0.1357
        2.4  -0.0300  -0.0400  -0.0525  -0.0663  -0.0700  -0.1044   0.0969
        2.6  -0.0300  -0.0400  -0.0525  -0.0663  -0.0700  -0.1324   0.0405
        2.8  -0.0300  -0.0400  -0.0525  -0.0663  -0.0700  -0.1587  -0.0138
        3.0  -0.0300  -0.0400  -0.0523  -0.0740  -0.0928  -0.1879  -0.0627
        3.2  -0.0300  -0.0400  -0.0523  -0.0740  -0.0928  -0.2159  -0.1115
        3.4  -0.0300  -0.0400  -0.0523  -0.0740  -0.0928  -0.2435  -0.1600
        3.6  -0.0300  -0.0400  -0.0523  -0.0740  -0.0928  -0.2715  -0.2089
        3.8  -0.0300  -0.0400  -0.0523  -0.0740  -0.0928  -0.2995  -0.2577
        4.0  -0.0300  -0.0400  -0.0521  -0.0769  -0.1000  -0.3467  -0.3061
        6.0  -0.0300  -0.0400  -0.0521  -0.0769  -0.1000  -0.3467  -0.3467
    </tableData>
  </table>

 <!-- thrust effects of helical tip Mach -->
 <table name="CT_MACH" type="internal">
   <tableData>
     0.85   1.0
     1.05   0.8
   </tableData>
 </table>

 <!-- power-required effects of helical tip Mach -->
 <table name="CP_MACH" type="internal">
   <tableData>
     0.85   1.0
     1.05   1.8
     2.00   1.4
   </tableData>
 </table>

</propeller>
